// COMSOL Multiphysics 6.0.0.354 model "FullSystem_L_spiral_nosolutions.mph"
// Outline of the model tree

Parameters
  dmem = 10[um]
  rmem = 3.2[mm]
  sigma_e = 1.5[S/m]
  epsilon_e = 80
  alpha = 1e9[1/(m^2*s)]
  Uep = 0.25[V]
  taup = 10*tpulse
  q = 1
  N0 = taup*alpha
  tpulse = 100[ms]
  trise = 5[us]
  Uapp = 100[V]
  rwire = 0.25[mm]
  rpore = 0.2[um]
  sigma_eff_TV = 0.0175[S/m]  // 0.4um=0.00365, 1.0um=0.0175
  epsilon_eff = 4.46  // 0.4um=3.69, 1.0um=4.46
  d_b2m = 0.8[mm]
  liq_b = 500[um]
  liq_up = 300[um]
  a1 = 0.1*rmem  // Initial spiral radius
  af = 2*rmem-0.5[mm]  // Final spiral radius
  n1 = 9  // number of turns
  thick = rwire  // Thickness of the wire
  theta_0 = 0  // Initial angle
  theta_f = (af-a1)/b1  // Final angle
  b1 = (af-a1)/(2*pi*n1)  // spiral growth rate
  b2 = (gap+thick)/(2*pi)  // updated growth rate
  distance = (af-a1)/n1  // tirn-to-turn distance
  gap = distance-thick  // gap distance
  h_tel = 4.5[mm]
  h_bel = -0.8[mm]
  t_el_short = 2.5[mm]
  rPET = 0.5[um]
  porosity = 1.6e6[1/cm^2]*(rPET==0.5e-6) + 2.0e6[1/cm^2]*(rPET==0.2e-6)
  Geff = porosity*2*sigma_e*pi*rPET^2/(pi*rPET + 2*dmem)
  sigma_eff = Geff*dmem

Functions
  an1: Analytic | funcname = pulse; expr = flc1hs(t-trise/2,trise/2) - flc1hs(t-tpulse-trise/2,trise/2); args = t; fununit = 1; argunit = s
  an2: Analytic "x_fun" | funcname = x_fun; expr = (a1+b2*s)*cos(s); args = s
  an3: Analytic "y_fun" | funcname = y_fun; expr = (a1+b2*s)*sin(s); args = s
  an4: Analytic "n_x" | funcname = n_x; expr = -d(y_fun(s),s)/sqrt(d(x_fun(s),s)^2+d(y_fun(s),s)^2); args = s
  an5: Analytic "n_y" | funcname = n_y; expr = d(x_fun(s),s)/sqrt(d(x_fun(s),s)^2+d(y_fun(s),s)^2); args = s

Variables
  var9 "line1 - trough porous membrane" on selection sel4
    E = ec.normE
  var8 "porous_mem" on selection sel13
    Gp = 1/((dmem/(sigma_e*pi*rpore^2))+(1/(2*sigma_e*rpore)))
    E_pmem = ec.normE
    Um = V1-V2
  var12 "V1" on domains 3
    V1 = V
  var13 "V2" on domains 1
    V2 = V
  var14 "I, A, R"
    Ip = intop1(ec.normJ)
    In = intop2(ec.normJ)
    Rp = Uapp/Ip
    Rn = Uapp/In

Selections
  sel4: Explicit "line1 - trough porous membrane" on edges 47, 48
  sel7: Explicit "Bottom liquid" on domains 1
  sel8: Explicit "upper liquid" on domains 3
  sel9: Explicit "insert" on domains 2
  sel10: Explicit "Top electrode-boundary" on boundaries 18, 19, 21, 22, 25, 27, 28, 30, 31, 39-42, 53
  sel12: Explicit "Bottom electrode-boundary" on boundaries 48-52, 54, 55, 59, 61, 64, 68, 70
  sel13: Explicit "porous membrane" on boundaries 13, 14

Couplings
  intop1: Integration on boundaries 18, 19, 21, 22, 27, 28, 30, 31, 39-42, 53
  intop2: Integration on boundaries 48-52, 54, 55, 59, 61, 68, 70

Geometry
  geom1 "Geometry 1" (3D, length unit m)
    wp1: WorkPlane | quickplane = xz; unite = on
      c1: Circle | pos = {2*rmem-0.5[mm], h_bel+0.25[mm]}; r = rwire
    wp2: WorkPlane (disabled) | quickz = -d_b2m+0.1[mm]; unite = on
      pc1: ParametricCurve | parmin = theta_0; parmax = theta_f; coord = {x_fun(s), y_fun(s)}
    cyl2: Cylinder "Top liquid" | r = rmem; h = 9.3[mm]
    cyl8: Cylinder "Top electrode-long" | pos = {-2.5[mm], 0, h_tel}; r = rwire; h = 14[mm]
    tor2: Torus "Top electrode-torus" | pos = {0, 0, h_tel}; axistype = y; rmaj = 2.5[mm]; rmin = rwire; angle = 90
    cyl14: Cylinder "Top electrode-short" | pos = {0[mm], 0, h_tel-2.5[mm]}; axistype = x; r = rwire; h = t_el_short
    pol1: Polygon "Line-trough porous membrane"
      source = table
      table = {{-10*dmem, -10*dmem, -300[um]}, {-10*dmem, -10*dmem, 300[um]}}
    cyl6: Cylinder "insert 6" | r = rmem+0.1[mm]; h = 17.5[mm]
    cyl12: Cylinder "insert 6.1" | r = rmem; h = 17.5[mm]
    dif2: Difference | input = cyl6; input2 = cyl12
    cyl7: Cylinder "bottom_liquid" | pos = {0, 0, -0.8[mm]}; r = 6.4[mm]; h = 0.8[mm]+4.1[mm]
    cyl10: Cylinder "bottom_liquid_around" | r = rmem+0.1[mm]; h = 4.1[mm]
    dif1: Difference | input = cyl7; input2 = cyl10
    pol2: Polygon "Line-on porous membrane" | source = table; table = {{rmem, 0, 0}, {-rmem, 0, 0}}
    cyl13: Cylinder "Bottom electrode" | pos = {2*rmem-0.5[mm], 0, h_bel+0.25[mm]}; r = rwire; h = 14[mm]
    ext2: Extrude (disabled) | workplane = wp2; input = wp2; distance = thick
    pc1: ParametricCurve "Parametric Curve - Spiral"
      parmin = theta_0
      parmax = theta_f
      coord = {x_fun(s), y_fun(s), d_b2m}
    swe1: Sweep
      face = wp1.c1 boundaries 1
      crossfaces = on
      includefinal = off
      edge = pc1(1) edges 1
      diredge = pc1(1) edges 1
      reversedir = on
      twistcomp = off
    fin: Finalize "Form Union"

Materials
  mat3: Common "M1_surr" on domains 1, 3
    def "Basic"
      electricconductivity = sigma_e
      relpermittivity = epsilon_e
  mat5: Common "M2_porouse_membrane" on boundaries 13, 14
    def "Basic"
      porosity = 0.0126
      electricconductivity = sigma_eff
      relpermittivity = epsilon_eff

Physics
  ec: ConductiveMedia "Electric Currents" on domains 1, 3
    dependent variable V
    PortSweepSettings.PortParamName = PortName
    cucn1: CurrentConservation (default) | minput_numberdensity = 0
    ein1: ElectricInsulation (default)
    init1: init "Initial Values 1" (default)
    pot1: ElectricPotential on selection sel10 | V0 = Uapp
    pot2: ElectricPotential on selection sel12
    ci1: ContactImpedance on boundaries 13, 14 | ds = dmem

Mesh
  mesh1 "Mesh 1"
    size: MeshSizeDefault "Whole model" | hmax = 0.00193; hmin = 3.47E-4; hcurve = 0.6; hnarrow = 0.5; hgrad = 1.5
    auto_f1: FreeTet "Free Tetrahedral 1" on entire geometry
      size1: Size "porous membrane" on boundaries 13, 14 | hmax = 1E-4; hauto = 3; custom = on
      size3: Size "line1 - trough porous membrane" on selection sel4 | hmax = 2E-4; custom = on
      size2: Size "line2 - on porous membrane" on edges 17 | hmax = 1E-4; hauto = 9; custom = on
      size4: Size "To electrode" on selection sel10 | hmax = 1e-4; hauto = 8; custom = on
      size5: Size "Bottom electrode" on selection sel12 | hmax = 1e-4; custom = on

Studies
  std1 "Study 1"
    param: Parametric "Parametric Sweep"
      sweeptype = filled
      pname = {rPET, n1}
      plistarr = {"0.2,0.5", "4,7"}
      punit = {um, }
    stat: Stationary

Solver configurations
  sol1 "Solution 1" (study std1)
    v1: Variables "Dependent Variables 1"
    s1: Stationary "Stationary Solver 1"
      fc1: FullyCoupled
      dDef: Direct
  sol2 "Parametric Solutions 1" (study std1)

Datasets
  dset3: Solution | solution = none
  dset4: Solution | solution = sol1
  dset5: Solution | solution = sol2

Derived values
  gev1: EvalGlobal | data = dset5; table = tbl1; expr = Rn; unit = Ω

Tables
  tbl1: Table
    // 1
    rPET (um) | n1 | Rn (Ω)
    0.2 | 4 | 160.834
    0.2 | 7 | 158.715
    0.5 | 4 | 92.5034
    0.5 | 7 | 90.5366

Plots
  pg1: PlotGroup3D "3D Plot Group 1" | data = dset5
    surf1: Surface | expr = Um
  pg2: PlotGroup3D "3D Plot Group 2" | data = dset5
    slc1: Slice | expr = V; quickplane = zx; quickynumber = 1

Exports
  img1: Image | size = current; unit = px; width = 800; height = 600; addsuffix = off