// COMSOL Multiphysics 6.0.0.354 model "cell_20um7um_default_30um_nosolution.mph"
// Outline of the model tree

Parameters
  dmem = 10[um]
  amem = 40[um]
  bmem = 80[um]
  acell = 20[um]
  bcell = 7[um]
  sigma_e = 1.5[S/m]
  sigma_i = 0.5[S/m]
  epsilon_e = 80
  Gm = 2[S/m^2]
  Cm = 1[uF/cm^2]
  dgap = 100[nm]
  dm = 5[nm]
  rp = 1[nm]
  sigma_p = (sigma_e-sigma_i)/(log(sigma_e/sigma_i) + (sigma_e == sigma_i)) + sigma_e*(sigma_e == sigma_i)
  alpha = 1e9[1/(m^2*s)]
  Uep = 0.25[V]
  taup = 1.5[s]
  N0 = taup*alpha
  q = 2.46
  rpore = 1.5[um]
  porosity = 0.8e6[1/cm^2]
  ddpore = sqrt(1/porosity)
  tpulse = 25[ms]
  trise = 1[us]
  Uapp = 10[V]

Functions
  an1: Analytic | funcname = pulse; expr = flc1hs(t-trise/2,trise/2) - flc1hs(t-tpulse-trise/2,trise/2); args = t; fununit = 1; argunit = s

Variables
  var1 "Variables 1" on domains 3
    Ve = V
  var2 "Variables 2" on domains 4
    Vi = V
  var3 "Variables 3" on selection sel1
    Um = Vi-Ve
    kpc = alpha*exp((Um/Uep)^2)
    kpd = alpha*exp((1-q)*(Um/Uep)^2)/N0
    Gp = 2*pi*rp^2*sigma_p/(pi*rp+2*dm)
    Gtot = Gm + N*Gp
  var7 "Variables 7" on selection sel1
    Aep = intop2(N >=1e13)
  var9 "Variables 9" on selection sel1
    Amem = intop2(1)
  var10 "current" on boundaries 3
    I = intop3(ec.normJ)

Selections
  sel1: Explicit "Membrane" on boundaries 12, 13, 15
  sel2: Explicit "pore" on no boundaries
  sel3: Explicit "crta" on no edges
  sel4: Explicit on no edges
  sel5: Explicit "pore_density" on no points

Couplings
  intop2: Integration on selection sel1
  intop3: Integration on boundaries 3

Geometry
  geom1 "Geometry 1" (3D, length unit m)
    blk1: Block | pos = {0, 0, -dmem}; size = {amem, bmem, dmem}
    blk2: Block | size = {amem, 2*amem, 100[um]}
    blk3: Block | pos = {0, 0, -100[um]}; size = {amem, 2*amem, 100[um]}
    wp1: WorkPlane | quickplane = xz; unite = on
      e1: Ellipse | pos = {0, dgap}; semiaxes = {acell, bcell}; angle = 90
      fil1: Fillet | point = e1(1) points 1; radius = 1[um]
    rev1: Revolve | workplane = wp1; input = wp1; angle2 = 90
    cyl1: Cylinder | pos = {ddpore/2, ddpore/2, -dmem}; r = rpore; h = dmem
    arr1: Array
      input = cyl1
      size = {floor(amem/ddpore), floor(bmem/ddpore), 1}
      fullsize = {floor(amem/ddpore), floor(bmem/ddpore), 1}
      displ = {ddpore, ddpore, 0}
    pol2: Polygon (disabled) | source = table; table = {{0, ddpore/2 + ddpore, dgap}, {amem, ddpore/2 +ddpore, dgap}}
    pol3: Polygon (disabled)
      source = table
      table = 
        {ddpore/2 + ddpore, ddpore/2 + 2*ddpore, dmem/2}
        {ddpore/2 + ddpore, ddpore/2 +2*ddpore, -3/2*dmem}
    pol4: Polygon (disabled)
      source = table
      table = {{0, ddpore/2 + ddpore + rpore/2, dgap}, {amem, ddpore/2 +ddpore + rpore/2, dgap}}
    pol5: Polygon (disabled)
      source = table
      table = {{0, ddpore/2 + ddpore - rpore/2, dgap}, {amem, ddpore/2 +ddpore - rpore/2, dgap}}
    fin: Finalize "Form Union"

Materials
  mat1: Common "Material 1" on domains 1, 3, 5-25
    def "Basic"
      electricconductivity = sigma_e
      relpermittivity = epsilon_e
  mat2: Common "Material 2" on domains 4
    def "Basic"
      electricconductivity = sigma_i
      relpermittivity = epsilon_e

Physics
  ec: ConductiveMedia "Electric Currents" on domains 1, 3-25
    dependent variable V
    PortSweepSettings.PortParamName = PortName
    cucn1: CurrentConservation (default) | minput_numberdensity = 0
    ein1: ElectricInsulation (default)
    init1: init "Initial Values 1" (default)
    pot1: ElectricPotential on boundaries 3 | V0 = Uapp
    pot2: ElectricPotential on boundaries 14
    ci1: ContactImpedance on selection sel1 | spec_type = surfimp; rhos = 1/Gtot; Csr = Cm
  wb: WeakFormBoundaryPDE on selection sel1
    dependent variable N
    Units.DependentVariableQuantity = none
    Units.CustomDependentVariableUnit = 1/m^2
    Units.CustomSourceTermUnit = 1/(m^2*s)
    wfeq1: WeakFormPDE (default) | weak = test(N)*(kpc-kpd*N-Nt)
    init1: init "Initial Values 1" (default)

Mesh
  mesh1 "Mesh 1"
    size: MeshSizeDefault | hmax = 2.0E-5; hmin = 3.6E-6; hcurve = 0.6; hnarrow = 0.5; hgrad = 1.5
    auto_f1: FreeTet "Free Tetrahedral 1" on remaining entities
      size1: Size (disabled) on no edges | hauto = 4
      size3: Size (disabled) on boundaries 22, 26, 30, 34, 38, 42, 46, 64, 68, 72, 76, 80, 84, 88, 106, 110, 114, 118, 122, 126, 130
        hmax = rpore/2
        hgrad = 1.2
        custom = on
      size4: Size on boundaries 12 | hmax = 1e-6; custom = on
      size5: Size on boundaries 13 | hmax = 1e-6; custom = on

Studies
  std1 "Study 1"
    param: Parametric "Parametric Sweep"
      sweeptype = filled
      pname = Uapp
      plistarr = 1,2.5,5,7.5,10,12.5,15,25,40,60
      punit = V
    time: Transient "Time Dependent" | tlist = 10^{range(-6,4/20,-2)}

Solver configurations
  sol1 "Solution 1" (study std1)
    v1: Variables "Dependent Variables 1"
    t1: Time "Time-Dependent Solver 1" | tlist = 10^{range(-6,4/20,-2)}; tstepsbdf = strict; initialstepbdf = 1e-8
      dDef: Direct
      fc1: FullyCoupled
  sol13 "Parametric Solutions 2" (study std1)

Datasets
  dset3: Solution | solution = sol1
  dset5: Solution | solution = sol13

Derived values
  pev1: EvalPoint "Point Evaluation 1" on points 5 | data = dset5; table = tbl1; expr = {Aep/Amem, Aep}; unit = {1, m^2}

Tables
  tbl1: Table
    // Point Evaluation 1
    Uapp (V) | Time (s) | Aep/Amem (1), Point: 5 | Aep (m^2), Point: 5
    1 | 0.01 | 0 | 0
    2.5 | 0.01 | 0 | 0
    5 | 0.01 | 0.150553 | 1.01062e-10
    7.5 | 0.01 | 0.358696 | 2.40783e-10
    10 | 0.01 | 0.522034 | 3.50428e-10
    12.5 | 0.01 | 0.602499 | 4.04442e-10
    15 | 0.01 | 0.652347 | 4.37904e-10
    25 | 0.01 | 0.763686 | 5.12643e-10
    40 | 0.01 | 0.817768 | 5.48947e-10
    60 | 0.01 | 0.848077 | 5.69292e-10

Plots
  pg1: PlotGroup3D "3D Plot Group 1" | data = dset5
    surf1: Surface | expr = N